x1 := [0; 0; 1; 1]
x2 := [0; 1; 0; 1]
y := [0; 1; 1; 1]
w := [0; 2; 0; 1; 2; 0; 1; 1; 1; 1]
speed := 0.3
f(x) := 1/(1 + e^(-x))
F(x1, x2, w) := f(f(f(x1*w[0] + x2*w[3])*w[4] + w[8])*w[6] + f(f(x1*w[2] + x2*w[1])*w[5] + w[9])*w[7])
Err(w) := 1/8*sum((y[i] - F(x1[i], x2[i], w))^2, i = 0 .. 3)
w :=
    k ← w
    while Err(k) ≥ 0.001
        grad ← ∇[k](Err(k))
        for i ∈ 0 .. 9
            k[i] ← k[i] - speed*grad[i]
    k
w = [3.37558; 1.9332; -0.137936; 3.47823; 7.22405; 0.445471; 8.62267; -4.18837; -5.37772; 2.28503]
for i ∈ 0 .. 3
    dorez[i] := F(x1[i], x2[i], w)
